deg_rad := π/180
lat := -19.9598075299
lat := lat*deg_rad → -0.348364359461
lon := 142.698012929
lon := lon*deg_rad → 2.49055016167
P_y := sin(lat) → -0.341360873369
proj := cos(lat) → 0.939932313591
P_z := cos(lon)*proj → -0.747671474967
P_x := sin(lon)*proj → 0.569614009355
vec := [P_x; P_y; P_z] → [0.569614009355; -0.341360873369; -0.747671474967]
a := [-0.648021846194; 0.498775284022; 0.575578754736]
b := [0.569614009355; -0.341360873369; -0.747671474967]
acos((a*b)/(|a|*|b|))*6371 float → 18443.4896526
|a - b|*6371 float → 12645.2024806
