deg_rad := π/180
rad_deg := 1/deg_rad float → 57.2957795131
A := [-0.234993437964; 0.400444385082; 0.885676226716]
B := [-0.502869355028; -0.864362430797; 0]
α := acos(A*B) → 1.80077636104
acos((a*b)/(|a|*|b|))*6371 float → 6371.0*acos(a*b/(|a|*|b|))
N := 3
|a - b|*6371 float → 6371.0*|b - 1.0*a|
rad_step := α/N*rad_deg → 34.3922951115
# Переход в базис окружности, образованной двумя векторами
dot := A*B → -0.227958083504
c_x := A → [-0.234993437964; 0.400444385082; 0.885676226716]
B_proj := A*dot → [0.0535686537542; -0.0912845345732; -0.201897055247]
c_y := (B - B_proj)/|B - B_proj| → [-0.57148465891; -0.793982709415; 0.207356557122]
c_z := [0; 0; 0]
# Точки дуги в локальном пространстве
P_1 := [1; 0; 0]
P_2 := [0.900362670; 0.435140282; 0]
P_3 := [0.621305823; 0.783568144; 0]
P_4 := [0.218438536; 0.975850701; 0]
P_5 := [-0.227958083; 0.973670959; 0]
# Те же точки, но уже в мировых координатах
P_1w := c_x*P_1[0] + c_y*P_1[1] + c_z*P_1[2] → [-0.234993437964; 0.400444385082; 0.885676226716]
P_2w := c_x*P_2[0] + c_y*P_2[1] + c_z*P_2[2] → [-0.460255314874; 0.0150513156613; 0.887659002982]
P_3w := c_x*P_3[0] + c_y*P_3[1] + c_z*P_3[2] → [-0.59379996488; -0.373341129745; 0.712753789561]
P_4w := c_x*P_4[0] + c_y*P_4[1] + c_z*P_4[2] → [-0.609015327566; -0.687336098337; 0.395814859958]
P_5w := c_x*P_5[0] + c_y*P_5[1] + c_z*P_5[2] → [-0.502869362259; -0.864362440477; 0.30267632787*10^-8]
# Пакуем базис окружности в матрицу
c_basis := [c_x, c_y, c_z] → [[-0.234993437964; 0.400444385082; 0.885676226716], [-0.57148465891; -0.793982709415; 0.207356557122], [0; 0; 0]]
c_basis*P_1 → [-0.234993437964; 0.400444385082; 0.885676226716]
P_1w → [-0.234993437964; 0.400444385082; 0.885676226716]
c_basis*P_2 → [-0.460255314874; 0.0150513156613; 0.887659002982]
P_2w → [-0.460255314874; 0.0150513156613; 0.887659002982]
c_basis*P_3 → [-0.59379996488; -0.373341129745; 0.712753789561]
P_3w → [-0.59379996488; -0.373341129745; 0.712753789561]
c_basis*P_4 → [-0.609015327566; -0.687336098337; 0.395814859958]
P_4w → [-0.609015327566; -0.687336098337; 0.395814859958]
c_basis*P_5 → [-0.502869362259; -0.864362440477; 0.30267632787*10^-8]
P_5w → [-0.502869362259; -0.864362440477; 0.30267632787*10^-8]
